Rods_count := 3  # Количество стержней магнитопровода
Mass_core := 8933 kg  # Количество стержней магнитопровода
Rod_diameter := 460 mm  # Диаметр стержня магнитопровода
Center_distance := 890 mm  # Межосевое расстояние магнитопровода
Window_height := 1190 mm  # Высота окна магнитопровода
Winding_weight_RO := 295 kg  # Масса обмотки РО
Winding_weight_VN := 1029 kg  # Масса обмотки ВН
Winding_weight_NN := 1446 kg  # Масса обмотки НН
Winding_height_RO := 955 mm  # Высота обмотки РО
Winding_height_VN := 955 mm  # Высота обмотки ВН
Winding_height_NN := 955 mm  # Высота обмотки НН
Cylinder_inner_diam_1_obm := 460 mm  # Внутренний диаметр цилиндра 1 обмотки
Cylinder_outer_diam_1_obm := 480 mm  # Внешний диаметр цилиндра 1 обмотки
Cylinder_inner_diam_2_obm := 650 mm  # Внутренний диаметр цилиндра 2 обмотки
Cylinder_outer_diam_2_obm := 662 mm  # Внешний диаметр цилиндра 2 обмотки
Cylinder_inner_diam_3_obm := 760 mm  # Внутренний диаметр цилиндра 3 обмотки
Cylinder_outer_diam_3_obm := 772 mm  # Внешний диаметр цилиндра 3 обмотки
Winding_inner_diam_1_obm := 520 mm  # Внутренний диаметр меди 1 обмотки
Winding_outer_diam_1_obm := 626 mm  # Внешний диаметр меди 1 обмотки
Winding_inner_diam_2_obm := 686 mm  # Внутренний диаметр меди 2 обмотки
Winding_outer_diam_2_obm := 732 mm  # Внешний диаметр меди 2 обмотки
Winding_inner_diam_3_obm := 792 mm  # Внутренний диаметр меди 3 обмотки
Winding_outer_diam_3_obm := 860 mm  # Внешний диаметр меди 3 обмотки
Yoke_copper_l_01 := 80 mm  # Расстояние ярмо - медь (1 обмотка)
Yoke_copper_l_02 := 80 mm  # Расстояние ярмо - медь (2 обмотка)
Yoke_copper_l_03 := 80 mm  # Расстояние ярмо - медь (3 обмотка)
Pressing_Force_RO := 2 kgf  # Усилие опрессовки обмотки РО
Pressing_Force_VN := 2 kgf  # Усилие опрессовки обмотки ВН
Pressing_Force_NN := 2 kgf  # Усилие опрессовки обмотки НН
Mass_active_part := 2 kg  # Масса активной части
